# Задание 1
# Координаты вершин
Xa := -2
Xb := -3
Xc := 0
Xd := 3
Xe := 2
Xf := -2
Xg := 2
Ya := -4
Yb := 0
Yc := 4
Yd := 0
Ye := -4
Yf := 0
Yg := 0
# Координаты углов области
# ЛВУ | ПНУ
Xlw := 100
Xhw := 400
Ylw := 200
Yhw := 500
# Координаты габаритной области
Zx := transpose([Xa, Xb, Xc, Xd, Xe, Xf, Xg])
Xl := min(Zx)
Xh := max(Zx)
ЛВУ
Xl = -3
Yh := 4
Zy := transpose([Ya, Yb, Yc, Yd, Ye, Yf, Yg])
Yh := max(Zy)
Yl := min(Zy)
ПНУ
Xh = 3
Yl = -4
# Параметры для матрицы пересчета координат
ΔXw := Xhw - Xlw
ΔXw = 300  # ширина области отображения (ОСК)
Δx := Xh - Xl
Δx = 6  # (МСК)
ΔYw := Yhw - Ylw
ΔYw = 300  # высота области отображения (ОСК)
Δy := Yh - Yl
Δy = 8  # (МСК)
Kx := ΔXw/Δx
Kx = 50  # коэффициенты необходимые для нормализации значений (пиксели)
Ky := ΔYw/Δy
Ky = 37.5
Tsw := [Kx, 0, Xlw - Kx*Xl; 0, -Ky, Yhw + Ky*Yl; 0, 0, 1]  # матрица пересчета из МСК в ОСК
# Координаты вершин (ОСК)
[Xgw; Ygw; q] := Tsw*[Xg; Yg; 1]
[Xaw; Yaw; q] := Tsw*[Xa; Ya; 1]
[Xbw; Ybw; q] := Tsw*[Xb; Yb; 1]
[Xcw; Ycw; q] := Tsw*[Xc; Yc; 1]
[Xdw; Ydw; q] := Tsw*[Xd; Yd; 1]
[Xew; Yew; q] := Tsw*[Xe; Ye; 1]
[Xfw; Yfw; q] := Tsw*[Xf; Yf; 1]
[Xgw; Ygw; q] = [350; 350; 1]
[Xaw; Yaw; q] = [150; 500; 1]
[Xbw; Ybw; q] = [100; 350; 1]
[Xcw; Ycw; q] = [250; 200; 1]
[Xdw; Ydw; q] = [400; 350; 1]
[Xew; Yew; q] = [350; 500; 1]
[Xfw; Yfw; q] = [150; 350; 1]
# Векторы принимающие в качестве значений координаты вершин
X := transpose([Xb, Xc, Xd, Xb, Xf, Xa, Xe, Xg, Xd])
Y := transpose([Yb, Yc, Yd, Yb, Yf, Ya, Ye, Yg, Yd])
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Xw := transpose([Xbw, Xcw, Xdw, Xbw, Xfw, Xaw, Xew, Xgw, Xdw])
Yw := transpose([Ybw, Ycw, Ydw, Ybw, Yfw, Yaw, Yew, Ygw, Ydw])
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# Задание 2
f(x) := sin(π*x)*sqrt(|x|)
x1 := -6
x2 := 6
Δx := 0.1
# ЛВУ | ПНУ
Xhw := 800
Xlw := 100
Yhw := 900
Ylw := 200
# Число точек графика
N := round((x2 - x1)/Δx)
N = 120
i := 0 .. N
X[i] := x1 + i*Δx
Y[i] := f(X[i])
Z[i] := 1
# Облатсь графика (МСК)
Xl := min(X)
Yh := max(Y)
Xh := max(X)
Yl := min(Y)
# ЛВУ | ПНУ
Xl = -6
Xh = 6
Yh = 2.34521
Yl = -2.34521
# Параметры для матрицы перехода
ΔXw := Xhw - Xlw
ΔXw = 700  # ширина области отображения
ΔX := Xh - Xl
ΔX = 12
ΔYw := Yhw - Ylw
ΔYw = 700  # высота области отображения
ΔY := Yh - Yl
ΔY = 4.69042
Kx := ΔXw/ΔX
Kx = 58.3333
# коэффициенты необходимые для нормализации значений
Ky := ΔYw/ΔY
Ky = 149.241
Tsw := [Kx, 0, Xlw - Kx*Xl; 0, -Ky, Yhw + Ky*Yl; 0, 0, 1]
Ms := stack(transpose(X), transpose(Y), transpose(Z))
# Матрица координат точек графика(ОСК)
Mw := Tsw*Ms
Xw := transpose(Mw)[:, 0]
Yw := transpose(Mw)[:, 1]  # (выбираем*x, y)*□
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