# Координаты вершин фигуры
Xa := 4
Ya := 2
Xb := 4
Yb := 8
Xc := 6
Yc := 7
Xd := 6
Yd := 3
X := transpose([Xa, Xb, Xc, Xd, Xa])
Y := transpose([Ya, Yb, Yc, Yd, Ya])
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# Ур-е прямой проходящей через точки  B и C
P := [Xa, Xb, Xc, Xd; Ya, Yb, Yc, Yd; 1, 1, 1, 1]
P = [4, 4, 6, 6; 2, 8, 7, 3; 1, 1, 1, 1]
Given
Yb == k1*Xb + b1
Yc == k1*Xc + b1
k1 := -1/2
Find(k1, b1) → [-1/2; 10]
b1 := 10
Given
Ya == k2*Xa + b2
Yd == k2*Xd + b2
k2 := 1/2
Find(k2, b2) → [1/2; 0]
b2 := 0
Given
y == k1*x + b1
-BC
y == k2*x + b2
-AD
Px := 10
Find(x, y) → [10; 5]
Py := 5
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# Смещение начала системы координат
Ts(dx, dy) := [1, 0, -dx; 0, 1, -dy; 0, 0, 1]
# Поворот объекта на угол ϕ = 90
φ := -90
Ro(φ) := [cos(φ), -sin(φ), 0; sin(φ), cos(φ), 0; 0, 0, 1]
φ_rad := φ*π/180 = -1.5708
# Координаты вершин фигуры
Pc := [Xa, Xb, Xc, Xd, Xa; Ya, Yb, Yc, Yd, Ya; 1, 1, 1, 1, 1]
# Смещение системы координат относительно точки пересечения P
P1 := Ts(Px, Py)*P = [-6, -6, -4, -4; -3, 3, 2, -2; 1, 1, 1, 1]
# Поворачиваем трапецию на угол 90 град по часовой стрелке
P2 := Ro(φ_rad)*P1 = [-3, 3, 2, -2; 6, 6, 4, 4; 1, 1, 1, 1]
# Смещаем систему координат в исходное положение
P3 := Ts(-Px, -Py)*P2 = [7, 13, 12, 8; 11, 11, 9, 9; 1, 1, 1, 1]
X1 := [P3[0, 0]; P3[0, 1]]
Y1 := [P3[1, 0]; P3[1, 1]]
X2 := [P3[0, 2]; P3[0, 3]]
Y2 := [P3[1, 2]; P3[1, 3]]
X3 := [P3[0, 0]; P3[0, 1]; P3[0, 2]; P3[0, 3]; P3[0, 0]]
Y3 := [P3[1, 0]; P3[1, 1]; P3[1, 2]; P3[1, 3]; P3[1, 0]]
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Px = 10
Py = 5
Px = 10
Py = 5
